<neuroml xmlns="http://www.neuroml.org/schema/neuroml2"  xmlns:xs="http://www.w3.org/2001/XMLSchema" xmlns:xsi="http://www.w3.org/2001/XMLSchema-instance" xsi:schemaLocation="http://www.neuroml.org/schema/neuroml2 https://raw.github.com/NeuroML/NeuroML2/development/Schemas/NeuroML2/NeuroML_v2.1.xsd" id="C51A_scaled_exp_resample_5">
    <include href="../channels/na_s.channel.nml"/>
    <include href="../channels/kdr.channel.nml"/>
    <include href="../channels/k.channel.nml"/>
    <include href="../channels/cal.channel.nml"/>
    <include href="../channels/BK.channel.nml"/>
    <include href="../channels/cah.channel.nml"/>
    <include href="../channels/kca.channel.nml"/>
    <include href="../channels/h.channel.nml"/>
    <include href="../channels/ca.nml"/>
    <include href="../channels/cacc.channel.nml"/>
    <include href="../channels/na_a.channel.nml"/>
    <include href="../channels/leak.channel.nml"/>
    <cell id="C51A">
        <morphology id="C51A_morphology">
            <segment id="0" name="Comp_0">
                <proximal x="1.000331e+02" y="1.170343e+02" z="6.407160e+01" diameter="12.16"/>
                <distal x="1.000331e+02" y="1.170343e+02" z="6.407160e+01" diameter="12.16"/>
            </segment>
            <segment id="1" name="Comp_1">
                <parent segment="0"/>
                <distal x="1.049112e+02" y="1.181112e+02" z="6.428235e+01" diameter="10.26"/>
            </segment>
            <segment id="2" name="Comp_2">
                <parent segment="0"/>
                <distal x="9.961858e+01" y="1.220170e+02" z="6.403776e+01" diameter="8.0275"/>
            </segment>
            <segment id="3" name="Comp_3">
                <parent segment="0"/>
                <distal x="9.940853e+01" y="1.172004e+02" z="5.911354e+01" diameter="3.8"/>
            </segment>
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            <segmentGroup neuroLexId="sao864921383" id="Cable_1">
                <member segment="57"/>
                <member segment="66"/>
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            </segmentGroup>
            <segmentGroup neuroLexId="sao864921383" id="Cable_2">
                <member segment="34"/>
                <member segment="40"/>
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            </segmentGroup>
            <segmentGroup neuroLexId="sao864921383" id="Cable_3">
                <member segment="55"/>
                <member segment="63"/>
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            </segmentGroup>
            <segmentGroup neuroLexId="sao864921383" id="Cable_4">
                <member segment="56"/>
                <member segment="64"/>
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            </segmentGroup>
            <segmentGroup neuroLexId="sao864921383" id="Cable_5">
                <member segment="78"/>
                <member segment="85"/>
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            </segmentGroup>
            <segmentGroup neuroLexId="sao864921383" id="Cable_6">
                <member segment="10"/>
                <member segment="15"/>
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            </segmentGroup>
            <segmentGroup neuroLexId="sao864921383" id="Cable_7">
                <member segment="5"/>
            </segmentGroup>
            <segmentGroup neuroLexId="sao864921383" id="Cable_8">
                <member segment="99"/>
                <member segment="108"/>
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            </segmentGroup>
            <segmentGroup neuroLexId="sao864921383" id="Cable_9">
                <member segment="100"/>
                <member segment="109"/>
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            </segmentGroup>
            <segmentGroup neuroLexId="sao864921383" id="Cable_10">
                <member segment="81"/>
                <member segment="89"/>
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            </segmentGroup>
            <segmentGroup neuroLexId="sao864921383" id="Cable_11">
                <member segment="19"/>
                <member segment="24"/>
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            </segmentGroup>
            <segmentGroup neuroLexId="sao864921383" id="Cable_12">
                <member segment="4"/>
                <member segment="9"/>
                <member segment="14"/>
            </segmentGroup>
            <segmentGroup neuroLexId="sao864921383" id="Cable_13">
                <member segment="0"/>
            </segmentGroup>
            <segmentGroup neuroLexId="sao864921383" id="Cable_14">
                <member segment="1"/>
            </segmentGroup>
            <segmentGroup neuroLexId="sao864921383" id="Cable_15">
                <member segment="18"/>
                <member segment="23"/>
                <member segment="29"/>
            </segmentGroup>
            <segmentGroup neuroLexId="sao864921383" id="Cable_16">
                <member segment="3"/>
                <member segment="8"/>
                <member segment="13"/>
            </segmentGroup>
            <segmentGroup neuroLexId="sao864921383" id="Cable_17">
                <member segment="11"/>
                <member segment="16"/>
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            </segmentGroup>
            <segmentGroup neuroLexId="sao864921383" id="Cable_18">
                <member segment="2"/>
                <member segment="6"/>
            </segmentGroup>
            <segmentGroup neuroLexId="sao864921383" id="Cable_19">
                <member segment="35"/>
                <member segment="42"/>
                <member segment="49"/>
            </segmentGroup>
            <segmentGroup neuroLexId="sao864921383" id="Cable_20">
                <member segment="54"/>
                <member segment="61"/>
                <member segment="68"/>
            </segmentGroup>
            <segmentGroup neuroLexId="sao864921383" id="Cable_21">
                <member segment="17"/>
                <member segment="22"/>
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            </segmentGroup>
            <segmentGroup neuroLexId="sao864921383" id="Cable_22">
                <member segment="7"/>
                <member segment="12"/>
            </segmentGroup>
            <segmentGroup id="all">
                <include segmentGroup="Cable_1"/>
                <include segmentGroup="Cable_2"/>
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            </segmentGroup>
            <segmentGroup neuroLexId="GO:0030425" id="all_dend"/>
            <segmentGroup neuroLexId="GO:0043025" id="all_soma">
                <include segmentGroup="Cable_7"/>
                <include segmentGroup="Cable_12"/>
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            </segmentGroup>
            <segmentGroup neuroLexId="GO:0030424" id="all_axon">
                <include segmentGroup="Cable_1"/>
                <include segmentGroup="Cable_2"/>
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            </segmentGroup>
        </morphology>
        <biophysicalProperties id="C51A_properties">
            <membraneProperties>
                <channelDensity id="na_s_soma" ionChannel="na_s" condDensity="30 mS_per_cm2" erev="55 mV" segmentGroup="all_soma" ion="na"/>
                <channelDensity id="kdr_soma" ionChannel="kdr" condDensity="30 mS_per_cm2" erev="-75 mV" segmentGroup="all_soma" ion="k"/>
                <channelDensity id="k_soma" ionChannel="k" condDensity="15 mS_per_cm2" erev="-75 mV" segmentGroup="all_soma" ion="k"/>
                <channelDensity id="cal_soma" ionChannel="cal" condDensity="30 mS_per_cm2" erev="120 mV" segmentGroup="all_soma" ion="ca"/>
                <channelDensity id="BK_soma" ionChannel="BK" condDensity="0 mS_per_cm2" erev="-88 mV" segmentGroup="all_soma" ion="k"/>
                <channelDensity id="cah_dend" ionChannel="cah" condDensity="10 mS_per_cm2" erev="120 mV" segmentGroup="all_dend" ion="ca"/>
                <channelDensity id="kca_dend" ionChannel="kca" condDensity="220 mS_per_cm2" erev="-75 mV" segmentGroup="all_dend" ion="k"/>
                <channelDensity id="h_dend" ionChannel="h" condDensity="25 mS_per_cm2" erev="-43 mV" segmentGroup="all_dend" ion="h"/>
                <channelDensity id="cacc_dend" ionChannel="cacc" condDensity="0 mS_per_cm2" erev="-45 mV" segmentGroup="all_dend" ion="cl"/>
                <channelDensity id="na_axon" ionChannel="na_a" condDensity="200 mS_per_cm2" erev="55 mV" segmentGroup="all_axon" ion="na"/>
                <channelDensity id="k_axon" ionChannel="k" condDensity="200 mS_per_cm2" erev="-75 mV" segmentGroup="all_axon" ion="k"/>
                <channelDensity id="leak_all" ionChannel="leak" condDensity="1.3e-2 mS_per_cm2" erev="10 mV" ion="non_specific"/>
                <spikeThresh value="0.0 mV"/>
                <specificCapacitance value="1.0 uF_per_cm2"/>
                <initMembPotential value="-60.0 mV"/>
            </membraneProperties>
            <intracellularProperties>
                <resistivity value="0.03 kohm_cm"/>
            </intracellularProperties>
        </biophysicalProperties>
    </cell>
</neuroml>
