<Lems>

    <!--

        This LEMS file has been automatically generated using PyNeuroML v0.5.11 (libNeuroML v0.2.55)

     -->

    <!-- Specify which component to run -->
    <Target component="Test" reportFile="SimStat_Test_C51A.txt"/>

    <!-- Include core NeuroML2 ComponentType definitions -->
    <Include file="Cells.xml"/>
    <Include file="Networks.xml"/>
    <Include file="Simulation.xml"/>

    <Include file="../Run/nml_C51A.net.nml"/>
    <Include file="../Run/C51A_scaled_exp_resample_5.cell.nml"/>
    <Include file="../channels/na_s.channel.nml"/>
    <Include file="../channels/ExpTime.nml"/>
    <Include file="../channels/kdr.channel.nml"/>
    <Include file="../channels/k.channel.nml"/>
    <Include file="../channels/cal.channel.nml"/>
    <Include file="../channels/BK.channel.nml"/>
    <Include file="../channels/cah.channel.nml"/>
    <Include file="../channels/kca.channel.nml"/>
    <Include file="../channels/h.channel.nml"/>
    <Include file="../channels/ca.nml"/>
    <Include file="../channels/cacc.channel.nml"/>
    <Include file="../channels/na_a.channel.nml"/>
    <Include file="../channels/leak.channel.nml"/>

    <Simulation id="Test" length="5000ms" step="0.025ms" target="network_of_C51A" seed="12345">  <!-- Note seed: ensures same random numbers used every run -->

        <Display id="Gates Soma" title="Soma gate variables" timeScale="1ms" xmin="-500.0" xmax="5500.0" ymin="0" ymax="1">
        </Display>

        <Display id="Soma Voltage" title="Dendrite trace" timeScale="1ms" xmin="-500.0" xmax="5500.0" ymin="-100" ymax="70">
            <Line id="0" quantity="population_of_C51A/0/C51A/0/v" scale="1" color="#d54f33" timeScale="1ms"/>
        </Display>

        <Display id="Caconc" title="Caconc trace" timeScale="1ms" xmin="-500.0" xmax="5500.0" ymin="-100" ymax="70">
            <Line id="10" quantity="population_of_C51A/0/C51A/140/caConc" scale="1" color="#0534e4" timeScale="1ms"/>
        </Display>

        <OutputFile id="Gate_file_soma" fileName="Test.Soma_gates.dat">
        </OutputFile>

        <OutputFile id="Soma file" fileName="C51A.vd.dat">
            <OutputColumn id="0" quantity="population_of_C51A/0/C51A/0/v"/>
        </OutputFile>

        <OutputFile id="Caconc file" fileName="Test.caconc.dat">
            <OutputColumn id="10" quantity="population_of_C51A/0/C51A/140/caConc"/>
        </OutputFile>

    </Simulation>

</Lems>
