<?xml version="1.0" encoding="UTF-8"?>
<neuroml xmlns="http://www.neuroml.org/schema/neuroml2" xmlns:xsi="http://www.w3.org/2001/XMLSchema-instance" xsi:schemaLocation="http://www.neuroml.org/schema/neuroml2  https://raw.githubusercontent.com/NeuroML/NeuroML2/development/Schemas/NeuroML2/NeuroML_v2beta5.xsd" id="C51A_scaled_exp_resample_5">
    <!-- soma -->
    <include href="../channels/na_s.channel.nml"/>
    <include href="../channels/kdr.channel.nml"/>
    <include href="../channels/k.channel.nml"/>
    <include href="../channels/cal.channel.nml"/>

    <!-- proximal_dendrite -->
    <include href="../channels/cah.channel.nml"/>
    <include href="../channels/kca.channel.nml"/>
    <include href="../channels/h.channel.nml"/>
    <include href="../channels/ca.nml"/>

    <!-- distal_dendrite -->
    <include href="../channels/na_a.channel.nml"/>

    <!-- all  -->
    <include href="../channels/leak.channel.nml"/>
    <!--
    % Cell morphology
    % p1     = 0.25;        % Cell surface ratio soma/dendrite
    % p2     = 0.15;        % Cell surface ratio distal_dendrite(hillock)/soma
    % g_int  = 0.13;        % Cell internal conductance

    Adend = ldend*pi*Rdendˆ2
    Asoma = lsoma*pi*Rsomaˆ2

    .25 = ldend*RDendˆ2 / lsoma*pi*Rsomaˆ2

    assume Rdend = 10;
    assume Rsoma = 20;
    assume lsoma = 20;
    assume ldend = 200
    4*1*ldend = lsoma*Rsomaˆ2
    4*1*ldend = 10*400

    assume lsoma = 20;
    ldend = 2250;

    Rdistal_dendrite = 20;
    .15 = ldistal_dendrite*20ˆ2 / 20*20ˆ2

    20 * .15 = ldistal_dendrite = 3;
    -->

    <cell id="C51A">

        <notes>Cell morphology generated by neuroConstruct from file: C51A_scaled_exp_resample_5.swc
TREES toolbox tree - C51A_scaled_exp_resample_5
written by an automatic procedure "swc_tree" part of the TREES package
in MATLAB
copyright 2009 Hermann Cuntz
inode R X Y Z D/2 idpar</notes>

        <morphology id="morphology_C51A_scaled_exp_resample_5">

            <segment id="0" name="Comp_1">
                <proximal x="100.0331" y="117.0343" z="64.0716" diameter="12.16"/>
                <distal x="103.44089" y="117.78664" z="64.21883" diameter="10.26"/>
            </segment>

            <segment id="1" name="Comp_3">
                <parent segment="0"/>
                <distal x="99.62035" y="121.99568" z="64.0379" diameter="8.0275"/>
            </segment>

            <segment id="2" name="Comp_4">
                <parent segment="0" fractionAlong="0.0"/>
                <proximal x="100.0331" y="117.0343" z="64.0716" diameter="12.16"/>
                <distal x="99.500984" y="117.175804" z="59.84744" diameter="3.8"/>
            </segment>

            <segment id="3" name="Comp_5">
                <parent segment="0" fractionAlong="0.0"/>
                <proximal x="100.0331" y="117.0343" z="64.0716" diameter="12.16"/>
                <distal x="98.23298" y="117.08635" z="60.51868" diameter="13.8225"/>
            </segment>

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
            <segmentGroup id="Soma" neuroLexId="sao864921383">    <!--
                This group contains an unbranched set of segments, and all of the segmentGroups marked with
                neuroLexId = sao864921383 form a non-overlapping set of all of the segments.
                These segmentGroups correspond to the 'cables' of NeuroML v1.8.1. -->

                <member segment="0"/>

                <member segment="1"/>

                <member segment="4"/>

                <member segment="5"/>
            </segmentGroup>

            <segmentGroup id="ExtraSomaSec_Comp_4" neuroLexId="sao864921383">    <!--
                This group contains an unbranched set of segments, and all of the segmentGroups marked with
                neuroLexId = sao864921383 form a non-overlapping set of all of the segments.
                These segmentGroups correspond to the 'cables' of NeuroML v1.8.1. -->

                <member segment="2"/>

                <member segment="7"/>

                <member segment="10"/>
            </segmentGroup>

            <segmentGroup id="ExtraSomaSec_Comp_5" neuroLexId="sao864921383">    <!--
                This group contains an unbranched set of segments, and all of the segmentGroups marked with
                neuroLexId = sao864921383 form a non-overlapping set of all of the segments.
                These segmentGroups correspond to the 'cables' of NeuroML v1.8.1. -->

                <member segment="3"/>

                <member segment="8"/>

                <member segment="11"/>
            </segmentGroup>

            <segmentGroup id="ExtraSomaSec_Comp_8" neuroLexId="sao864921383">    <!--
                This group contains an unbranched set of segments, and all of the segmentGroups marked with
                neuroLexId = sao864921383 form a non-overlapping set of all of the segments.
                These segmentGroups correspond to the 'cables' of NeuroML v1.8.1. -->

                <member segment="6"/>

                <member segment="9"/>
            </segmentGroup>

            <segmentGroup id="Sec_Comp_11" neuroLexId="sao864921383">    <!--
                This group contains an unbranched set of segments, and all of the segmentGroups marked with
                neuroLexId = sao864921383 form a non-overlapping set of all of the segments.
                These segmentGroups correspond to the 'cables' of NeuroML v1.8.1. -->

                <member segment="12"/>

                <member segment="14"/>

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            </segmentGroup>

            <segmentGroup id="Sec_Comp_12" neuroLexId="sao864921383">    <!--
                This group contains an unbranched set of segments, and all of the segmentGroups marked with
                neuroLexId = sao864921383 form a non-overlapping set of all of the segments.
                These segmentGroups correspond to the 'cables' of NeuroML v1.8.1. -->

                <member segment="13"/>

                <member segment="15"/>

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            </segmentGroup>

            <segmentGroup id="Sec_Comp_18" neuroLexId="sao864921383">    <!--
                This group contains an unbranched set of segments, and all of the segmentGroups marked with
                neuroLexId = sao864921383 form a non-overlapping set of all of the segments.
                These segmentGroups correspond to the 'cables' of NeuroML v1.8.1. -->

                <member segment="16"/>

                <member segment="21"/>

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            </segmentGroup>

            <segmentGroup id="Sec_Comp_19" neuroLexId="sao864921383">    <!--
                This group contains an unbranched set of segments, and all of the segmentGroups marked with
                neuroLexId = sao864921383 form a non-overlapping set of all of the segments.
                These segmentGroups correspond to the 'cables' of NeuroML v1.8.1. -->

                <member segment="17"/>

                <member segment="22"/>

                <member segment="28"/>
            </segmentGroup>

            <segmentGroup id="Sec_Comp_20" neuroLexId="sao864921383">    <!--
                This group contains an unbranched set of segments, and all of the segmentGroups marked with
                neuroLexId = sao864921383 form a non-overlapping set of all of the segments.
                These segmentGroups correspond to the 'cables' of NeuroML v1.8.1. -->

                <member segment="18"/>

                <member segment="23"/>

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            </segmentGroup>

            <segmentGroup id="Sec_Comp_35" neuroLexId="sao864921383">    <!--
                This group contains an unbranched set of segments, and all of the segmentGroups marked with
                neuroLexId = sao864921383 form a non-overlapping set of all of the segments.
                These segmentGroups correspond to the 'cables' of NeuroML v1.8.1. -->

                <member segment="33"/>

                <member segment="39"/>

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            </segmentGroup>

            <segmentGroup id="Sec_Comp_36" neuroLexId="sao864921383">    <!--
                This group contains an unbranched set of segments, and all of the segmentGroups marked with
                neuroLexId = sao864921383 form a non-overlapping set of all of the segments.
                These segmentGroups correspond to the 'cables' of NeuroML v1.8.1. -->

                <member segment="34"/>

                <member segment="41"/>

                <member segment="48"/>
            </segmentGroup>

            <segmentGroup id="Sec_Comp_55" neuroLexId="sao864921383">    <!--
                This group contains an unbranched set of segments, and all of the segmentGroups marked with
                neuroLexId = sao864921383 form a non-overlapping set of all of the segments.
                These segmentGroups correspond to the 'cables' of NeuroML v1.8.1. -->

                <member segment="53"/>

                <member segment="60"/>

                <member segment="67"/>
            </segmentGroup>

            <segmentGroup id="Sec_Comp_56" neuroLexId="sao864921383">    <!--
                This group contains an unbranched set of segments, and all of the segmentGroups marked with
                neuroLexId = sao864921383 form a non-overlapping set of all of the segments.
                These segmentGroups correspond to the 'cables' of NeuroML v1.8.1. -->

                <member segment="54"/>

                <member segment="62"/>

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            </segmentGroup>

            <segmentGroup id="Sec_Comp_57" neuroLexId="sao864921383">    <!--
                This group contains an unbranched set of segments, and all of the segmentGroups marked with
                neuroLexId = sao864921383 form a non-overlapping set of all of the segments.
                These segmentGroups correspond to the 'cables' of NeuroML v1.8.1. -->

                <member segment="55"/>

                <member segment="63"/>

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            </segmentGroup>

            <segmentGroup id="Sec_Comp_58" neuroLexId="sao864921383">    <!--
                This group contains an unbranched set of segments, and all of the segmentGroups marked with
                neuroLexId = sao864921383 form a non-overlapping set of all of the segments.
                These segmentGroups correspond to the 'cables' of NeuroML v1.8.1. -->

                <member segment="56"/>

                <member segment="65"/>

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            </segmentGroup>

            <segmentGroup id="Sec_Comp_79" neuroLexId="sao864921383">    <!--
                This group contains an unbranched set of segments, and all of the segmentGroups marked with
                neuroLexId = sao864921383 form a non-overlapping set of all of the segments.
                These segmentGroups correspond to the 'cables' of NeuroML v1.8.1. -->

                <member segment="77"/>

                <member segment="84"/>

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            </segmentGroup>

            <segmentGroup id="Sec_Comp_82" neuroLexId="sao864921383">    <!--
                This group contains an unbranched set of segments, and all of the segmentGroups marked with
                neuroLexId = sao864921383 form a non-overlapping set of all of the segments.
                These segmentGroups correspond to the 'cables' of NeuroML v1.8.1. -->

                <member segment="80"/>

                <member segment="88"/>

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            </segmentGroup>

            <segmentGroup id="Sec_Comp_100" neuroLexId="sao864921383">    <!--
                This group contains an unbranched set of segments, and all of the segmentGroups marked with
                neuroLexId = sao864921383 form a non-overlapping set of all of the segments.
                These segmentGroups correspond to the 'cables' of NeuroML v1.8.1. -->

                <member segment="98"/>

                <member segment="107"/>

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            </segmentGroup>

            <segmentGroup id="Sec_Comp_101" neuroLexId="sao864921383">    <!--
                This group contains an unbranched set of segments, and all of the segmentGroups marked with
                neuroLexId = sao864921383 form a non-overlapping set of all of the segments.
                These segmentGroups correspond to the 'cables' of NeuroML v1.8.1. -->

                <member segment="99"/>

                <member segment="108"/>

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            </segmentGroup>

            <segmentGroup id="all">
                <include segmentGroup="Soma"/>
                <include segmentGroup="ExtraSomaSec_Comp_4"/>
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            </segmentGroup>

            <segmentGroup id="Colour_White">
                <include segmentGroup="Soma"/>
                <include segmentGroup="ExtraSomaSec_Comp_4"/>
                <include segmentGroup="ExtraSomaSec_Comp_5"/>
                <include segmentGroup="ExtraSomaSec_Comp_8"/>
            </segmentGroup>

            <segmentGroup id="soma_group" neuroLexId="GO:0043025">    <!--Soma group-->

                <include segmentGroup="Soma"/>
            </segmentGroup>

            <segmentGroup id="proximal_dendrite_group" neuroLexId="GO:0030425">    <!--Procimal Dendrite group-->

                <include segmentGroup="ExtraSomaSec_Comp_4"/>
                <include segmentGroup="ExtraSomaSec_Comp_5"/>
                <include segmentGroup="ExtraSomaSec_Comp_8"/>
            </segmentGroup>

            <segmentGroup id="ExtraSomaSegments">
                <include segmentGroup="ExtraSomaSec_Comp_4"/>
                <include segmentGroup="ExtraSomaSec_Comp_5"/>
                <include segmentGroup="ExtraSomaSec_Comp_8"/>
            </segmentGroup>

            <segmentGroup id="Colour_DarkGrey">
                <include segmentGroup="Sec_Comp_11"/>
                <include segmentGroup="Sec_Comp_12"/>
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            </segmentGroup>

            <segmentGroup id="distal_dendrite_group" neuroLexId="GO:0030424">    <!--Distal Dendrite group-->

                <include segmentGroup="Sec_Comp_11"/>
                <include segmentGroup="Sec_Comp_12"/>
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            </segmentGroup>

        </morphology>

            <!--Adding the biophysical parameters-->

        <biophysicalProperties id="biophys">

            <membraneProperties>
                <!-- soma -->
                <channelDensity condDensity="30 mS_per_cm2" id="na_s_soma" segmentGroup="soma_group" ionChannel="na_s" ion="na" erev="55 mV"/>
                <channelDensity condDensity="30 mS_per_cm2" id="kdr_soma" segmentGroup="soma_group"
                ionChannel="kdr" ion="k" erev="-75 mV"/>
                <channelDensity condDensity="15 mS_per_cm2" id="k_soma" segmentGroup="soma_group"
                ionChannel="k" ion="k" erev="-75 mV"/>
                <channelDensity condDensity="20 mS_per_cm2" id="cal_soma" segmentGroup="soma_group"
                ionChannel="cal" ion="cal" erev="120 mV"/>

                <!-- proximal_dendrite 10 35 25-->
                <channelDensity condDensity="10 mS_per_cm2" id="cah_dend" segmentGroup="proximal_dendrite_group" ionChannel="cah" ion="ca" erev="120 mV"/>
                <channelDensity condDensity="35 mS_per_cm2" id="kca_dend" segmentGroup="proximal_dendrite_group" ionChannel="kca" ion="k" erev="-75 mV"/>
                <channelDensity condDensity="25 mS_per_cm2" id="h_dend" segmentGroup="proximal_dendrite_group" ionChannel="h" ion="k" erev="-43 mV"/>

                <!-- distal_dendrite -->
                <channelDensity condDensity="200 mS_per_cm2" id="na_distdend" segmentGroup="distal_dendrite_group" ionChannel="na_a" ion="na" erev="55 mV"/>
                <channelDensity condDensity="200 mS_per_cm2" id="k_distdend" segmentGroup="distal_dendrite_group" ionChannel="k" ion="k" erev="-75 mV"/>

                <channelDensity condDensity="1.3e-2 mS_per_cm2" id="leak_all" segmentGroup="all" ionChannel="leak" ion="_leak" erev="10 mV"/>

                <spikeThresh value="0 mV"/>
                <specificCapacitance value="1 uF_per_cm2"/>
                <initMembPotential value="-65.0 mV"/>

            </membraneProperties>

            <intracellularProperties>
                <species segmentGroup="proximal_dendrite_group" id="ca" ion="ca" concentrationModel="ca_conc" initialConcentration="3.7152 mM" initialExtConcentration="3.0mM"/>

                <resistivity value="1 ohm_cm" segmentGroup="soma_group"/>
                <resistivity value="1 ohm_cm" segmentGroup="proximal_dendrite_group"/>
                <resistivity value="1 ohm_cm" segmentGroup="distal_dendrite_group"/>
            </intracellularProperties>

        </biophysicalProperties>

    </cell>

</neuroml>
